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# Appendix C  Unit Functions Reference
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# NIST RefProp Functions with Appropriately Applied Units
# (For Mathcad Prime and Version 2.0 or later of the RefProp Add-In)
# Most property routines listed below require a fluid string, fl, to specify the fluid properties to use.  Make calls to rp_property functions with one of the RefProp fluids (e.g. fl := "CO2.fld") or mixtures.  Fluid names are not case sensitive.
# Function to get the version string:
Refprop_Addin_Version(i) := rp_getvers(i)
isV10? := rp_getRPnum(0) ≥ 10 = 1
NIST_Refprop_Version(i) := rp_getNIST(i)
# Fluid Information Functions
Name(fl, component) := rp_getname(fl, component)  # Returns a string with the full fluid name
CASN(fl, component) := rp_getcasn(fl, component)  # Returns a string containing the CAS number
# The following functions all retrieve specific properties and constants.  The parameters to each function (unless it's a component number) should have appropriate Mathcad units applied.  Each of these functions will convert the passed parameters to the units expected by the RefProp functions, and return values with appropriate units applied.  Temperatures should always be passed with absolute temperature units of K or R.
# Basic Physical Constants by individual component (component = 1 for a pure fluid)
# Molecular Weight
WM(fl, comp) := rp_wmol(fl, comp)*gm/mol
R_g(fl, comp) := rp_rgas(fl, comp)*J*mol^-1*K^-1
# Critical Point | Triple Point
# Temperature
T_c(fl, component) := rp_tcrit(fl, component)*K
T_t(fl, component) := rp_ttrip(fl, component)*K
# Pressure
P_c(fl, component) := rp_pcrit(fl, component)*MPa
P_t(fl, component) := rp_ptrip(fl, component)*MPa
# Density
ρ_c(fl, component) := rp_rhocrit(fl, component)*kg/m^3
# Temperature and Pressure Functions along the Saturation Curve
T_sat(fl, P) := rp_tsatp(fl, P/MPa)*K
P_sat(fl, T) := rp_psatt(fl, T/K)*MPa
T_satf(fl, P) := rp_tsatpf(fl, P/MPa)*K
P_satf(fl, T) := rp_psattf(fl, T/K)*MPa
T_satg(fl, P) := rp_tsatpg(fl, P/MPa)*K
P_satg(fl, T) := rp_psattg(fl, T/K)*MPa
# Cricondentherm and Cricondenbar Temperature and Pressure Functions
# along the Saturation Curve
T_maxT(fl) := rp_maxX(fl, "T")[0] K
T_maxP(fl) := rp_maxX(fl, "P")[0] K
P_maxT(fl) := rp_maxX(fl, "T")[1] MPa
P_maxP(fl) := rp_maxX(fl, "P")[1] MPa
# Thermodynamic Properties as functions of Temperature and Pressure
# Fluid function subscripts indicate the phase region and the independent parameter to be used.
# A subscript of f indicates saturated liquid (fluid) and a subscript of g indicates saturated vapor (gas). If neither f or g is used, the function returns either subcooled liquid or superheated vapor values.  These functions are only defined between the triple point and the critical point, and will return an error otherwise.
#
# A second subscript of t, p, or both indicates the independent parameter that should be passed.  Thus, ρ_fp would return the saturated liquid density as a function of the saturation pressure, p.  Alternatively, ρ_tp will return the general subcooled liquid or superheated vapor density as a function of both temperature, t, and pressure, p.
# Density, ρ
# Saturated Liquid as a function of temperature:
ρ_ft(fl, T) := rp_rhoft(fl, T/K)*kg/m^3
# Saturated Vapor as a function of temperature:
ρ_gt(fl, T) := rp_rhogt(fl, T/K)*kg/m^3
# Saturated Liquid as a function of temperature:
ρ_fp(fl, P) := rp_rhofp(fl, P/MPa)*kg/m^3
# Saturated Vapor as a function of temperature:
ρ_gp(fl, P) := rp_rhogp(fl, P/MPa)*kg/m^3
# Subcooled Liquid or Superheated Vapor as a
# function of both temperature and pressure:
ρ_tp(fl, T, P) := rp_rhotp(fl, T/K, P/MPa)*kg/m^3
# Enthalpy, h
h_ft(fl, T) := rp_hft(fl, T/K)*kJ/kg
h_gt(fl, T) := rp_hgt(fl, T/K)*kJ/kg
h_fp(fl, P) := rp_hfp(fl, P/MPa)*kJ/kg
h_gp(fl, P) := rp_hgp(fl, P/MPa)*kJ/kg
h_tp(fl, T, P) := rp_htp(fl, T/K, P/MPa)*kJ/kg
# Entropy, s
s_ft(fl, T) := rp_sft(fl, T/K)*kJ/(kg*K)
s_gt(fl, T) := rp_sgt(fl, T/K)*kJ/(kg*K)
s_fp(fl, P) := rp_sfp(fl, P/MPa)*kJ/(kg*K)
s_gp(fl, P) := rp_sgp(fl, P/MPa)*kJ/(kg*K)
s_tp(fl, T, P) := rp_stp(fl, T/K, P/MPa)*kJ/(kg*K)
# Internal Energy, u
u_fp(fl, P) := rp_ufp(fl, P/MPa)*kJ/kg
u_gp(fl, P) := rp_ugp(fl, P/MPa)*kJ/kg
u_ft(fl, T) := rp_uft(fl, T/K)*kJ/kg
u_gt(fl, T) := rp_ugt(fl, T/K)*kJ/kg
u_tp(fl, T, P) := rp_utp(fl, T/K, P/MPa)*kJ/kg
# Isobaric Specific Heat, Cp
Cp_fp(fl, P) := rp_cpfp(fl, P/MPa)*kJ/(kg*K)
Cp_gp(fl, P) := rp_cpgp(fl, P/MPa)*kJ/(kg*K)
Cp_ft(fl, T) := rp_cpft(fl, T/K)*kJ/(kg*K)
Cp_gt(fl, T) := rp_cpgt(fl, T/K)*kJ/(kg*K)
Cp_tp(fl, T, P) := rp_cptp(fl, T/K, P/MPa)*kJ/(kg*K)
# Isochoric Specific Heat, Cv
Cv_fp(fl, P) := rp_cvfp(fl, P/MPa)*kJ/(kg*K)
Cv_gp(fl, P) := rp_cvgp(fl, P/MPa)*kJ/(kg*K)
Cv_ft(fl, T) := rp_cvft(fl, T/K)*kJ/(kg*K)
Cv_gt(fl, T) := rp_cvgt(fl, T/K)*kJ/(kg*K)
Cv_tp(fl, T, P) := rp_cvtp(fl, T/K, P/MPa)*kJ/(kg*K)
# Sonic Velocity, w
w_fp(fl, P) := rp_wfp(fl, P/MPa)*m/s
w_gp(fl, P) := rp_wgp(fl, P/MPa)*m/s
w_ft(fl, T) := rp_wft(fl, T/K)*m/s
w_gt(fl, T) := rp_wgt(fl, T/K)*m/s
w_tp(fl, T, P) := rp_wtp(fl, T/K, P/MPa)*m/s
# Transport Properties as Functions of Temperature and Pressure
# Thermal Conductivity, k
k_fp(fl, P) := rp_kfp(fl, P/MPa)*W/(m*K)
k_gp(fl, P) := rp_kgp(fl, P/MPa)*W/(m*K)
k_ft(fl, T) := rp_kft(fl, T/K)*W/(m*K)
k_gt(fl, T) := rp_kgt(fl, T/K)*W/(m*K)
k_tp(fl, T, P) := rp_ktp(fl, T/K, P/MPa)*W/(m*K)
# Fluid Viscosity, μ
μ_fp(fl, P) := rp_mufp(fl, P/MPa)*μPa*s
μ_gp(fl, P) := rp_mugp(fl, P/MPa)*(μPa*s)
μ_ft(fl, T) := rp_muft(fl, T/K)*(μPa*s)
μ_gt(fl, T) := rp_mugt(fl, T/K)*(μPa*s)
μ_tp(fl, T, P) := rp_mutp(fl, T/K, P/MPa)*(μPa*s)
# Some Additional Property Functions
# Surface Tension
σ_t(fl, T) := rp_surften(fl, T/K)*N/m
# Latent Heat
h_fg(fl, t) := h_gt(fl, t) - h_ft(fl, t)
# Vapor Quality
x_th(f, t, h) := min(max((h - h_ft(f, t))/(h_gt(f, t) - h_ft(f, t)), 0), 1.0)
x_ph(f, p, h) := min(max((h - h_fp(f, p))/(h_gp(f, p) - h_fp(f, p)), 0), 1.0)
x_ts(f, t, s) := min(max((s - s_ft(f, t))/(s_gt(f, t) - s_ft(f, t)), 0), 1.0)
x_ps(f, p, s) := min(max((s - s_fp(f, p))/(s_gp(f, p) - s_fp(f, p)), 0), 1.0)
x_tρ(f, t, ρ) := min(max((ρ - ρ_ft(f, t))/(ρ_gt(f, t) - ρ_ft(f, t)), 0), 1.0)
x_pρ(f, p, ρ) := min(max((ρ - ρ_fp(f, p))/(ρ_gp(f, p) - ρ_fp(f, p)), 0), 1.0)
x_tu(f, t, u) := min(max((u - u_ft(f, t))/(u_gt(f, t) - u_ft(f, t)), 0), 1.0)
x_pu(f, p, u) := min(max((u - u_fp(f, p))/(u_gp(f, p) - u_fp(f, p)), 0), 1.0)
# 2-phase Properties
h_tx(f, t, x) := h_ft(f, t)*(1 - x) + h_gt(f, t)*x
h_px(f, p, x) := h_fp(f, p)*(1 - x) + h_gp(f, p)*x
s_tx(f, t, x) := s_ft(f, t)*(1 - x) + s_gt(f, t)*x
s_px(f, p, x) := s_fp(f, p)*(1 - x) + s_gp(f, p)*x
u_tx(f, t, x) := u_ft(f, t)*(1 - x) + u_gt(f, t)*x
u_px(f, p, x) := u_fp(f, p)*(1 - x) + u_gp(f, p)*x
ρ_tx(f, t, x) := (ρ_ft(f, t)^-1*(1 - x) + ρ_gt(f, t)^-1*x)^-1
ρ_px(f, p, x) := (ρ_fp(f, p)^-1*(1 - x) + ρ_gp(f, p)^-1*x)^-1
Δρ_t(f, t) := ρ_ft(f, t) - ρ_gt(f, t)
Δρ_p(f, p) := ρ_fp(f, p) - ρ_gp(f, p)
# Derived Quantities
# Morton Number
Mo(f, P) := g*μ_fp(f, P)^4*Δρ_p(f, P)/(ρ_fp(f, P)^2*σ_t(f, T_sat(f, P))^3)
# Dynamic Viscosity
ν_fp(f, P) := μ_fp(f, P)/ρ_fp(f, P)
ν_gp(f, P) := μ_gp(f, P)/ρ_gp(f, P)
ν_tp(f, T, P) := μ_tp(f, T, P)/ρ_tp(f, T, P)
ν_ft(f, T) := μ_ft(f, T)/ρ_ft(f, T)
ν_gt(f, T) := μ_gt(f, T)/ρ_gt(f, T)
# Prandtl Number
Pr(f, T, P) == μ_tp(f, T, P)*Cp_tp(f, T, P)/k_tp(f, T, P)
Pr_fp(f, P) := rp_prfp(f, P/MPa)
Pr_gp(f, P) := rp_prgp(f, P/MPa)
Pr_tp(f, T, P) := rp_prtp(f, T/K, P/MPa)
Pr_ft(f, T) := rp_prft(f, T/K)
Pr_gt(f, T) := rp_prgt(f, T/K)
# Coefficient of Thermal Expansion
β_fp(f, P) := rp_betafp(f, P/MPa) K^-1
β_gp(f, P) := rp_betagp(f, P/MPa) K^-1
β_tp(f, T, P) := rp_betatp(f, T/K, P/MPa) K^-1
β_ft(f, T) := rp_betaft(f, T/K) K^-1
β_gt(f, T) := rp_betagt(f, T/K) K^-1
β_c(fl, T, P) := -1/ρ_tp(fl, T, P)*(d/dT(ρ_tp(fl, T, P)))
# Isentropic Exponent
γ_fp(f, P) := rp_gammafp(f, P/MPa)
γ_gp(f, P) := rp_gammagp(f, P/MPa)
γ_tp(f, T, P) := rp_gammatp(f, T/K, P/MPa)
γ_ft(f, T) := rp_gammaft(f, T/K)
γ_gt(f, T) := rp_gammagt(f, T/K)
γ_c(fl, T, P) := Cp_tp(fl, T, P)/Cv_tp(fl, T, P)
# Compressibility
Z_fp(fl, P) := rp_zfp(fl, P/MPa)
Z_tp(fl, T, P) := rp_ztp(fl, T/K, P/MPa)
Z_ft(fl, T) := rp_zft(fl, T/K)
Z_c(fl, comp) == rp_zcrit(fl, comp)
Z_gt(fl, T) := rp_zgt(fl, T/K)
Z_gp(fl, P) := rp_zgp(fl, P/MPa)
# Reverse Functions of Pressure/Temperature and Enthalpy/Entropy
T_ph(fl, p, h) := rp_tph(fl, p/MPa, h*kg/kJ)*K
T_hs(fl, h, s) := rp_ths(fl, h*kg/kJ, s*kg*K/kJ)*K
T_ps(fl, p, s) := rp_tps(fl, p/MPa, s*kg*K/kJ)*K
P_hs(fl, h, s) := rp_phs(fl, h*kg/kJ, s*kg*K/kJ)*MPa
P_th(fl, t, h, r) := rp_pth(fl, t/K, h*kg/kJ, r)*MPa
P_ts(fl, t, s) := rp_pts(fl, t/K, s*kg*K/kJ)*MPa
ρ_th(fl, t, h, r) := rp_rhoth(fl, t/K, h*kg/kJ, r)*kg/m^3
ρ_ts(fl, t, s) := rp_rhots(fl, t/K, s*kg*K/kJ)*kg/m^3
ρ_ph(fl, p, h) := rp_rhoph(fl, p/MPa, h*kg/kJ)*kg/m^3
ρ_ps(fl, p, s) := rp_rhops(fl, p/MPa, s*kg*K/kJ)*kg/m^3
h_ps(fl, p, s) := rp_hps(fl, p/MPa, s*kg*K/kJ)*kJ/kg
s_ph(fl, p, h) := rp_sph(fl, p/MPa, h*kg/kJ)*kJ/(kg*K)
h_ts(fl, t, h) := rp_hts(fl, t/K, h*kg*K/kJ)*kJ/kg
s_th(fl, t, h, r) := rp_sth(fl, t/K, h*kg/kJ, r)*kJ/(kg*K)
# Some Additional Unit Definitions
kJ ≡ 1000*J
% ≡ 1%
μPa ≡ 10^-6*Pa
# Some Additional Utility Functions
# Utility function that inputs a two-column matrix of fluids and mole fractions and outputs a formatted custom fluid string for the mixtures.
MixString(M) :=
    n ← rows(M) - 1
    s ← ""
    y ← 0
    for i ∈ 0 .. n
        y ← y + M[i, 1]
        x ← concat("[", num2str(M[i, 1]), "]")
        s ← concat(s, M[i, 0], x)
        if i < n
            s ← concat(s, "&")
    msg ← "Composition does not sum to unity."
    if |1 - y| < 0.000001
        s
    else
        error(msg)
Composition(fluid) :=
    mf ← rp_getx(fluid)
    for i ∈ 0 .. last(mf)
        cn[i] ← rp_getname(fluid, i + 1)
    return augment(cn, mf)
